# Milling speeds and feeds
# Joni Leskelä
# Spindle speed | Feel free to use this calculator sheet
Vc := 350  # Cutting speed (m/min)
D := 50  # Tool diameter (mm)
n := Vc*1000/(D*π) = 2228.17  # Spindle speed (rev/min)
# Table feed end milling
Z := 4  # Number of teeth
f_z := 0.2  # Feed per tooth
V_F := f_z*Z*n = 1782.54  # Feed rate (mm/min)
# Table feed drills
f_n := 1  # Feed per revolution (mm)
V_f := f_n*n = 2228.17  # Feed rate (mm/min)
# Cutting speed
DC_ap := 8  # Cutting diameter at cutting depth ap (mm)
Vc := π*DC_ap*n/1000 = 56  # Cutting speed (m/min)
# Feed per tooth
f_z := V_F/(n*Z) = 0.2  # (mm)
# Feed per revolution
f_n := V_f/n = 1  # (mm/rev)
# Metal removal rate milling
A_p := 1  # Axial depth of cut (mm)
A_e := 1  # Radial depth of cut (mm)
Q_m := A_p*A_e*V_F/1000 = 1.78254  # Material removed (cm3/min)
# Metal removal rate drilling
Q_d := D*f_n*Vc/4 = 700  # Material removed (cm3/min)
# Net power
k_c := 150  # Material constant, specific cutting force, N/mm2
P_c := A_p*A_e*V_F*k_c/(60*10^6) = 0.00445634  # Net power (kW)
# Torque
M_c := P_c*30*10^6/(π*n) = 19.0986  # Torque (Nm)
# This covers general calculations for milling
